*Heading
** Job name: Delamination0 Model name: Delamination
** Generated by: Abaqus/CAE 2024
*Preprint, echo=NO, model=NO, history=NO, contact=NO
**
** PARTS
**
*Part, name=Panel1
*Node
      1,           0.,           0.
      2,           2.,           0.
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*Element, type=DC2D4
   1,    1,    2,  103,  102
   2,    2,    3,  104,  103
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*Nset, nset=Set-1, generate
    1,  1111,     1
*Elset, elset=Set-1, generate
    1,  1000,     1
** Section: Beam
*Solid Section, elset=Set-1, material=Timber-Heat
,
*End Part
**
*Part, name=Panel2
*Node
      1,           0.,           0.
      2,           2.,           0.
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*Element, type=DC2D4
   1,    1,    2,  103,  102
   2,    2,    3,  104,  103
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*Nset, nset=Set-1, generate
    1,  1111,     1
*Elset, elset=Set-1, generate
    1,  1000,     1
** Section: Beam
*Solid Section, elset=Set-1, material=Timber-Heat
,
*End Part
**
*Part, name=Panel3
*Node
      1,           0.,          40.
      2,           2.,          40.
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*Element, type=DC2D4
   1,    1,    2,  103,  102
   2,    2,    3,  104,  103
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*Nset, nset=Set-1, generate
    1,  1111,     1
*Elset, elset=Set-1, generate
    1,  1000,     1
** Section: Beam
*Solid Section, elset=Set-1, material=Timber-Heat
,
*End Part
**
*Part, name=Panel4
*Node
      1,           0.,          60.
      2,           2.,          60.
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*Element, type=DC2D4
   1,    1,    2,  103,  102
   2,    2,    3,  104,  103
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*Nset, nset=Set-1, generate
    1,  1111,     1
*Elset, elset=Set-1, generate
    1,  1000,     1
** Section: Beam
*Solid Section, elset=Set-1, material=Timber-Heat
,
*End Part
**
*Part, name=Panel5
*Node
      1,           0.,          80.
      2,           2.,          80.
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*Element, type=DC2D4
   1,    1,    2,  103,  102
   2,    2,    3,  104,  103
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*Nset, nset=Set-1, generate
    1,  1111,     1
*Elset, elset=Set-1, generate
    1,  1000,     1
** Section: Beam
*Solid Section, elset=Set-1, material=Timber-Heat
,
*End Part
**
**
** ASSEMBLY
**
*Assembly, name=Assembly
**
*Instance, name=Panel1-1, part=Panel1
*End Instance
**
*Instance, name=Panel2-1, part=Panel2
          0.,          20.,           0.
*End Instance
**
*Instance, name=Panel3-1, part=Panel3
*End Instance
**
*Instance, name=Panel4-1, part=Panel4
*End Instance
**
*Instance, name=Panel5-1, part=Panel5
*End Instance
**
*Nset, nset=Wholeset, instance=Panel1-1, generate
    1,  1111,     1
*Nset, nset=Wholeset, instance=Panel4-1, generate
    1,  1111,     1
*Nset, nset=Wholeset, instance=Panel2-1, generate
    1,  1111,     1
*Nset, nset=Wholeset, instance=Panel3-1, generate
    1,  1111,     1
*Elset, elset=Wholeset, instance=Panel1-1, generate
    1,  1000,     1
*Elset, elset=Wholeset, instance=Panel4-1, generate
    1,  1000,     1
*Elset, elset=Wholeset, instance=Panel2-1, generate
    1,  1000,     1
*Elset, elset=Wholeset, instance=Panel3-1, generate
    1,  1000,     1
*Elset, elset=_Bottom_1_S1, internal, instance=Panel1-1, generate
   1,  100,    1
*Surface, type=ELEMENT, name=Bottom_1
_Bottom_1_S1, S1
*Elset, elset=_Bottom_2_S1, internal, instance=Panel2-1, generate
   1,  100,    1
*Surface, type=ELEMENT, name=Bottom_2
_Bottom_2_S1, S1
*Elset, elset=_Bottom_3_S1, internal, instance=Panel3-1, generate
   1,  100,    1
*Surface, type=ELEMENT, name=Bottom_3
_Bottom_3_S1, S1
*Elset, elset=_Bottom_4_S1, internal, instance=Panel4-1, generate
   1,  100,    1
*Surface, type=ELEMENT, name=Bottom_4
_Bottom_4_S1, S1
*Elset, elset=_Bottom_5_S1, internal, instance=Panel5-1, generate
   1,  100,    1
*Surface, type=ELEMENT, name=Bottom_5
_Bottom_5_S1, S1
*Elset, elset=_Top_1_S3, internal, instance=Panel1-1, generate
  901,  1000,     1
*Surface, type=ELEMENT, name=Top_1
_Top_1_S3, S3
*Elset, elset=_Top_2_S3, internal, instance=Panel2-1, generate
  901,  1000,     1
*Surface, type=ELEMENT, name=Top_2
_Top_2_S3, S3
*Elset, elset=_Top_3_S3, internal, instance=Panel3-1, generate
  901,  1000,     1
*Surface, type=ELEMENT, name=Top_3
_Top_3_S3, S3
*Elset, elset=_Top_4_S3, internal, instance=Panel4-1, generate
  901,  1000,     1
*Surface, type=ELEMENT, name=Top_4
_Top_4_S3, S3
** Constraint: Constraint-1
*Tie, name=Constraint-1, adjust=yes
Bottom_2, Top_1
** Constraint: Constraint-2
*Tie, name=Constraint-2, adjust=yes
Bottom_3, Top_2
** Constraint: Constraint-3
*Tie, name=Constraint-3, adjust=yes
Bottom_4, Top_3
** Constraint: Constraint-4
*Tie, name=Constraint-4, adjust=yes
Bottom_5, Top_4
*End Assembly
*Amplitude, name=DHP10
             0.,             20.,              5.,            538.,             12.,            694.,             75.,            100.
           120.,             80.,            180.,             60.
*Amplitude, name=Film
             0.,              1.,             10.,              1.,            10.5,              1.,            480.,              1.
*Amplitude, name=ISO
             0.,             20.,              5.,            538.,             10.,            704.,             15.,            760.
            20.,            795.,             25.,            821.,             30.,            843.,             35.,            862.
            40.,            878.,             45.,            892.,             50.,            905.,             55.,            916.
            60.,            927.,             65.,            937.,             70.,            946.,             75.,            955.
            80.,            963.,             85.,            971.,             90.,            978.,             95.,            985.
           100.,            991.,            105.,            996.,            110.,           1001.,            115.,           1006.
           120.,           1010.,            130.,           1017.,            140.,           1024.,            150.,           1031.
           160.,           1038.,            170.,           1045.,            180.,           1052.,            190.,           1059.
           200.,           1066.,            210.,           1072.,            220.,           1079.,            230.,           1086.
           240.,           1093.,            250.,           1100.,            260.,           1107.,            270.,           1114.
*Amplitude, name=ISO-cooling
             0.,             20.,              5.,            538.,             10.,            704.,             15.,            760.
            20.,            795.,             25.,            821.,             30.,            843.,             35.,            862.
            40.,            878.,             45.,            892.,             50.,            905.,             55.,            916.
            60.,            927.,             61.,            899.,             66.,            695.,             72.,            576.
            84.,            459.,             96.,            389.,            108.,            340.,            132.,            267.
           144.,            244.,            168.,            209.,            192.,            173.,            228.,            143.
           264.,            116.,            324.,             91.,            384.,             76.,            468.,             65.
*Amplitude, name=Radiation
             0.,              1.,             10.,              1.,            10.5,             0.8,            480.,             0.8
**
** MATERIALS
**
*Material, name=Timber-Heat
*Conductivity
 7.2,  20.
  9., 200.
 4.2, 350.
 5.4, 500.
 21., 800.
 90.,1200.
*Density
 5.04e-10, 20.
 5.04e-10, 99.
  4.5e-10,120.
  4.5e-10,200.
 4.19e-10,250.
 3.42e-10,300.
 2.34e-10,350.
 1.71e-10,400.
 1.26e-10,600.
  1.2e-10,800.
*Expansion, zero=20.
 4e-06,
*Specific Heat
 1.53e+09,  20.
 1.77e+09,  99.
 2.72e+10, 110.
 2.12e+09, 121.
    2e+09, 200.
 1.62e+09, 250.
    1e+09, 300.
    1e+09, 350.
    1e+09, 400.
  1.4e+09, 600.
 1.65e+09, 800.
 1.65e+09,1200.
**
** INTERACTION PROPERTIES
**
*Surface Interaction, name=IntProp-1
1.,
*Gap Conductance
 7.2,0.
  0.,1.
**
** PHYSICAL CONSTANTS
**
*Physical Constants, absolute zero=-273.16, stefan boltzmann=3.40182e-09
**
** PREDEFINED FIELDS
**
** Name: Predefined Field-1   Type: Temperature
*Initial Conditions, type=TEMPERATURE
Wholeset, 20.
** ----------------------------------------------------------------
**
** STEP: Step-1
**
*Step, name=Step-1, nlgeom=NO, inc=10000
*Heat Transfer, end=PERIOD, deltmx=800.
0.1, 32., 1e-09, 1.,
**
** INTERACTIONS
**
** Interaction: Int-1
*Sfilm, amplitude=ISO
Bottom_1, F, 1., 1.5
** Interaction: Int-2
*Sradiate, amplitude=ISO
Bottom_1, R, 1., 0.8
**
** OUTPUT REQUESTS
**
*Restart, write, frequency=1
**
** FIELD OUTPUT: F-Output-1
**
*Output, field
*Node Output
NT,
*Element Output, directions=YES
TEMP,
*Output, history, frequency=0
*End Step
** ----------------------------------------------------------------
**
** STEP: Step-2
**
*Step, name=Step-2, nlgeom=NO, inc=10000
*Heat Transfer, end=PERIOD, deltmx=800.
0.1, 1., 1e-09, 1.,
**
** INTERACTIONS
**
** Interaction: Int-3
*Model Change, activate
**
** OUTPUT REQUESTS
**
*Restart, write, frequency=1
**
** FIELD OUTPUT: F-Output-1
**
*Output, field
*Node Output
NT,
*Element Output, directions=YES
TEMP,
*Output, history, frequency=0
*End Step
